# Hexapod 2G
# Обратная задача кинематики
# Константы (длины звеньев)
# Точка назначения
# (координаты конца лапы)
OA := 37
AB := 44
BC := 83
Destination := [1; -77; -70]
x := Destination[0] = 1
y := Destination[1] = -77  # Решение для задней левой лапы
z := Destination[2] = -70
p := sqrt(x^2 + y^2) = 77.0065
OC := sqrt(p^2 + z^2) = 104.067
AC := sqrt((p - OA)^2 + z^2) = 80.6258
Qrad := atan(z/(p - OA)) = -1.05158
Q0rad := acos((AB^2 + AC^2 - BC^2)/(2*AB*AC)) = 1.35092
atan(y/x) = -1.55781
q0rad := atan(y/x) + π = 1.58378
q1rad := Qrad + Q0rad = 0.299337
q2rad := acos((AB^2 + BC^2 - AC^2)/(2*AB*BC)) = 1.24692
q0real := q0rad*180/π = 90.7441
q1real := q1rad*180/π = 17.1507
q2real := q2rad*180/π = 71.443
q0 := q0real - 135 = -44.2559
q1 := q1real + 90 = 107.151
q2 := q2real = 71.443
Ap := OA
Bp := OA + AB*cos(q1rad) = 79.0434
Cp := p = 77.0065
Ax := OA*cos(q0rad) = -0.480479
Bx := Bp*cos(q0rad) = -1.02645
Cx := x = 1
Ay := OA*sin(q0rad) = 36.9969
By := Bp*sin(q0rad) = 79.0368
Cy := y = -77
Az := 0
Bz := AB*sin(q1rad) = 12.975
Cz := z = -70
CoordX := [0; Ax; Bx; Cx] = [0; -0.480479; -1.02645; 1]
CoordY := [0; Ay; By; Cy] = [0; 36.9969; 79.0368; -77]
CoordZ := [0; Az; Bz; Cz] = [0; 0; 12.975; -70]
CoordP := [0; Ap; Bp; Cp] = [0; 37; 79.0434; 77.0065]
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# Решение прямой задачи кинематики
q0 := 90
q0real := q0 + 135 = 225
q1 := 90
q1real := q1 - 90 = 0
q2 := 90
q2real := q2 = 90
q0rad := q0real*π/180 = 3.92699
q1rad := q1real*π/180 = 0
q0 := 90
q1 := 90
q2rad := q2real*π/180 = 1.5708
q2 := 90
Bp := OA + AB*cos(q1rad) = 81
Cp := Bp + BC*cos(π - q1rad - q2rad) = 81
Ap := OA = 37
Ax := Ap*cos(q0rad) = -26.163
Bx := Bp*cos(q0rad) = -57.2756
Cx := Cp*cos(q0rad) = -57.2756
Ay := Ap*sin(q0rad) = -26.163
By := Bp*sin(q0rad) = -57.2756
Cy := Cp*sin(q0rad) = -57.2756
Az := 0
Bz := AB*sin(q1rad) = 0
Cz := Bz - BC*sin(π - q1rad - q2rad) = -83
Cx = -57.2756
CoordY := [0; Ay; By; Cy] = [0; -26.163; -57.2756; -57.2756]
CoordX := [0; Ax; Bx; Cx] = [0; -26.163; -57.2756; -57.2756]
Cy = -57.2756
CoordZ := [0; Az; Bz; Cz] = [0; 0; 0; -83]
CoordP := [0; Ap; Bp; Cp] = [0; 37; 81; 81]
Cz = -83
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