# Hexapod 2G
# Обратная задача кинематики
# Константы (длины звеньев)
# Точка назначения
# (координаты конца лапы)
OA := 37
AB := 44
BC := 83
Destination := [-50; 0; -50]
x := Destination[0] = -50
y := Destination[1] = 0  # Решение для передней левой лапы
z := Destination[2] = -50
p := sqrt(x^2 + y^2) = 50
OC := sqrt(p^2 + z^2) = 70.7107
AC := sqrt((p - OA)^2 + z^2) = 51.6624
Qrad := atan(z/(p - OA)) = -1.31643
Q0rad := acos((AB^2 + AC^2 - BC^2)/(2*AB*AC)) = 2.09715
q0rad := atan(y/x) + π = 3.14159
q1rad := Qrad + Q0rad = 0.780726
q2rad := acos((AB^2 + BC^2 - AC^2)/(2*AB*BC)) = 0.568284
q0real := q0rad*180/π = 180
q1real := q1rad*180/π = 44.7323
q2real := q2rad*180/π = 32.5603
q0 := q0real - 45 = 135
q1 := q1real + 90 = 134.732
q2 := q2real = 32.5603
Ap := OA
Bp := OA + AB*cos(q1rad) = 68.2577
Cp := p = 50
Ax := OA*cos(q0rad) = -37
Bx := Bp*cos(q0rad) = -68.2577
Cx := x = -50
Ay := OA*sin(q0rad) = 4.53104e-15
By := Bp*sin(q0rad) = 8.35888e-15
Cy := y = 0
Az := 0
Bz := AB*sin(q1rad) = 30.967
Cz := z = -50
CoordX := [0; Ax; Bx; Cx] = [0; -37; -68.2577; -50]
CoordY := [0; Ay; By; Cy] = [0; 4.53104e-15; 8.35888e-15; 0]
CoordZ := [0; Az; Bz; Cz] = [0; 0; 30.967; -50]
CoordP := [0; Ap; Bp; Cp] = [0; 37; 68.2577; 50]
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# Решение прямой задачи кинематики
q0 := 70
q0real := q0 + 45 = 115
q1 := 55
q1real := q1 - 90 = -35
q2 := 110
q2real := q2 = 110
q0rad := q0real*π/180 = 2.00713
q1rad := q1real*π/180 = -0.610865
q0 := 90
q1 := 90
q2rad := q2real*π/180 = 1.91986
q2 := 90
Bp := OA + AB*cos(q1rad) = 73.0427
Cp := Bp + BC*cos(π - q1rad - q2rad) = 51.5607
Ap := OA = 37
Ax := Ap*cos(q0rad) = -15.6369
Bx := Bp*cos(q0rad) = -30.8692
Cx := Cp*cos(q0rad) = -21.7905
Ay := Ap*sin(q0rad) = 33.5334
By := Bp*sin(q0rad) = 66.1992
Cy := Cp*sin(q0rad) = 46.7299
Az := 0
Bz := AB*sin(q1rad) = -25.2374
Cz := Bz - BC*sin(π - q1rad - q2rad) = -105.409
Cx = -21.7905
CoordY := [0; Ay; By; Cy] = [0; 33.5334; 66.1992; 46.7299]
CoordX := [0; Ax; Bx; Cx] = [0; -15.6369; -30.8692; -21.7905]
Cy = 46.7299
CoordZ := [0; Az; Bz; Cz] = [0; 0; -25.2374; -105.409]
CoordP := [0; Ap; Bp; Cp] = [0; 37; 73.0427; 51.5607]
Cz = -105.409
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