# Hexapod 2G
# Обратная задача кинематики
# Константы (длины звеньев)
# Точка назначения
# (координаты конца лапы)
OA := 37
Destination := [60; 60; -50]
AB := 44
BC := 83
x := Destination[0] = 60
y := Destination[1] = 60
z := Destination[2] = -50  # Решение для передней правой лапы
p := sqrt(x^2 + y^2) = 84.8528
OC := sqrt(p^2 + z^2) = 98.4886
AC := sqrt((p - OA)^2 + z^2) = 69.209
Qrad := atan(z/(p - OA)) = -0.807338
Q0rad := acos((AB^2 + AC^2 - BC^2)/(2*AB*AC)) = 1.59758
q0rad := atan(y/x) = 0.785398
q1rad := Qrad + Q0rad = 0.790243
q2rad := acos((AB^2 + BC^2 - AC^2)/(2*AB*BC)) = 0.985493
q0real := q0rad*180/π = 45
q1real := q1rad*180/π = 45.2776
q2real := q2rad*180/π = 56.4646
q0 := q0real + 45 = 90
q1 := q1real + 90 = 135.278
q2 := q2real = 56.4646
Ap := OA
Bp := OA + AB*cos(q1rad) = 67.9616
Cp := p = 84.8528
Ax := OA*cos(q0rad) = 26.163
Bx := Bp*cos(q0rad) = 48.0561
Cx := x = 60
Ay := OA*sin(q0rad) = 26.163
By := Bp*sin(q0rad) = 48.0561
Cy := y = 60
Az := 0
Bz := AB*sin(q1rad) = 31.2631
Cz := z = -50
CoordY := [0; Ay; By; Cy] = [0; 26.163; 48.0561; 60]
CoordX := [0; Ax; Bx; Cx] = [0; 26.163; 48.0561; 60]
CoordZ := [0; Az; Bz; Cz] = [0; 0; 31.2631; -50]
CoordP := [0; Ap; Bp; Cp] = [0; 37; 67.9616; 84.8528]
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# Решение прямой задачи кинематики
q0 := 90
q1 := 90
q0real := q0 - 45 = 45
q2 := 90
q1real := q1 - 90 = 0
q2real := q2 = 90
q0rad := q0real*π/180 = 0.785398
q0 := 90
q1rad := q1real*π/180 = 0
q1 := 153.605
q2 := 45.519
q2rad := q2real*π/180 = 1.5708
Bp := OA + AB*cos(q1rad) = 81
Cp := Bp + BC*cos(π - q1rad - q2rad) = 81
Ap := OA = 37
Ax := Ap*cos(q0rad) = 26.163
Bx := Bp*cos(q0rad) = 57.2756
Cx := Cp*cos(q0rad) = 57.2756
Ay := Ap*sin(q0rad) = 26.163
By := Bp*sin(q0rad) = 57.2756
Cy := Cp*sin(q0rad) = 57.2756
Az := 0
Bz := AB*sin(q1rad) = 0
Cz := Bz - BC*sin(π - q1rad - q2rad) = -83
Cx = 57.2756
CoordY := [0; Ay; By; Cy] = [0; 26.163; 57.2756; 57.2756]
CoordX := [0; Ax; Bx; Cx] = [0; 26.163; 57.2756; 57.2756]
Cy = 57.2756
CoordZ := [0; Az; Bz; Cz] = [0; 0; 0; -83]
CoordP := [0; Ap; Bp; Cp] = [0; 37; 81; 81]
Cz = -83
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