# Hexapod 2G
# Обратная задача кинематики
# Константы (длины звеньев)
# Точка назначения
# (координаты конца лапы)
OA := 37
AB := 44
BC := 83
Destination := [50; 10; -50]
Destination := [81; 0; -50]
x := Destination[0] = 81
y := Destination[1] = 0  # Решение для центральной правой лапы
z := Destination[2] = -50
p := sqrt(x^2 + y^2) = 81
OC := sqrt(p^2 + z^2) = 95.1893
AC := sqrt((p - OA)^2 + z^2) = 66.6033
Qrad := atan(z/(p - OA)) = -0.849141
Q0rad := acos((AB^2 + AC^2 - BC^2)/(2*AB*AC)) = 1.65912
q0rad := atan(y/x) = 0
q1rad := Qrad + Q0rad = 0.809978
q2rad := acos((AB^2 + BC^2 - AC^2)/(2*AB*BC)) = 0.926165
q0real := q0rad*180/π = 0
q1real := q1rad*180/π = 46.4083
q2real := q2rad*180/π = 53.0654
q0 := q0real + 90 = 90
q1 := q1real + 90 = 136.408
q2 := q2real = 53.0654
Ap := OA
Bp := OA + AB*cos(q1rad) = 67.3386
Cp := p = 81
Ax := OA*cos(q0rad) = 37
Bx := Bp*cos(q0rad) = 67.3386
Cx := x = 81
Ay := OA*sin(q0rad) = 0
By := Bp*sin(q0rad) = 0
Cy := y = 0
Az := 0
Bz := AB*sin(q1rad) = 31.868
Cz := z = -50
CoordY := [0; Ay; By; Cy]
CoordX := [0; Ax; Bx; Cx]
CoordZ := [0; Az; Bz; Cz] = [0; 0; 31.868; -50]
CoordP := [0; Ap; Bp; Cp] = [0; 37; 67.3386; 81]
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# Решение прямой задачи кинематики
q0 := 90
q0real := q0 - 90 = 0
q1 := 90
q1real := q1 - 90 = 0
q2 := 90
q2real := q2 = 90
q0rad := q0real*π/180 = 0
q1rad := q1real*π/180 = 0
q0 := 90
q1 := 90
q2rad := q2real*π/180 = 1.5708
q2 := 90
Bp := OA + AB*cos(q1rad) = 81
Cp := Bp + BC*cos(π - q1rad - q2rad) = 81
Ap := OA = 37
Ax := Ap*cos(q0rad) = 37
Bx := Bp*cos(q0rad) = 81
Cx := Cp*cos(q0rad) = 81
Ay := Ap*sin(q0rad) = 0
By := Bp*sin(q0rad) = 0
Cy := Cp*sin(q0rad) = 0
Az := 0
Bz := AB*sin(q1rad) = 0
Cz := Bz - BC*sin(π - q1rad - q2rad) = -83
Cx = 81
Cy = 0
CoordY := [0; Ay; By; Cy]
CoordX := [0; Ax; Bx; Cx]
CoordZ := [0; Az; Bz; Cz] = [0; 0; 0; -83]
CoordP := [0; Ap; Bp; Cp] = [0; 37; 81; 81]
Cz = -83
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